<neuroml xmlns="http://www.neuroml.org/schema/neuroml2"  xmlns:xs="http://www.w3.org/2001/XMLSchema" xmlns:xsi="http://www.w3.org/2001/XMLSchema-instance" xsi:schemaLocation="http://www.neuroml.org/schema/neuroml2 https://raw.github.com/NeuroML/NeuroML2/development/Schemas/NeuroML2/NeuroML_v2beta5.xsd" id="network">
  <include href="RothmanMFToGrCAMPA.xml"/>
  <include href="RothmanMFToGrCNMDA.xml"/>
    <iafRefCell id="iaF_GrC" leakReversal="-79.67mV" thresh="-40mV" reset="-63mV" C="3.22pF" leakConductance="1.498nS" refract="2ms"/>
    <spikeGeneratorRefPoisson averageRate="0 Hz" id="mossySpikerOFF" minimumISI="2 ms"/>
  <spikeGeneratorRefPoisson averageRate="50 Hz" id="mossySpikerON" minimumISI="2 ms"/>
    <network id="network">
        <population id="iaF_GrCPop" component="iaF_GrC" size="487" type="populationList">
            <instance id="0">
                <location x="-20.57549145687495" y="-10.467588252511213" z="31.750903258076164"/>
            </instance>
            <instance id="1">
                <location x="-9.950172330133515" y="17.743417627907057" z="-28.282766233796892"/>
            </instance>
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        </population>
        <population id="mossySpikerONPop" component="mossySpikerON" size="187" type="populationList">
            <instance id="0">
                <location x="6.75789129522326" y="-4.460977248927534" z="-28.336482341080853"/>
            </instance>
            <instance id="1">
                <location x="0.411712394064324" y="-15.580246388599889" z="-21.053454438443282"/>
            </instance>
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        </population>
        <population id="mossySpikerOFFPop" component="mossySpikerOFF" size="0"/>
        <projection id="ONProjAMPA" presynapticPopulation="mossySpikerONPop" postsynapticPopulation="iaF_GrCPop" synapse="RothmanMFToGrCAMPA">
            <connection id="0" preCellId="../mossySpikerONPop/0/mossySpikerON" preSegmentId="0" preFractionAlong="0.5" postCellId="../iaF_GrCPop/40/iaF_GrC" postSegmentId="0" postFractionAlong="0.5"/>
            <connection id="1" preCellId="../mossySpikerONPop/0/mossySpikerON" preSegmentId="0" preFractionAlong="0.5" postCellId="../iaF_GrCPop/40/iaF_GrC" postSegmentId="0" postFractionAlong="0.5"/>
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        </projection>
        <projection id="ONProjNMDA" presynapticPopulation="mossySpikerONPop" postsynapticPopulation="iaF_GrCPop" synapse="RothmanMFToGrCNMDA">
            <connection id="0" preCellId="../mossySpikerONPop/0/mossySpikerON" preSegmentId="0" preFractionAlong="0.5" postCellId="../iaF_GrCPop/40/iaF_GrC" postSegmentId="0" postFractionAlong="0.5"/>
            <connection id="1" preCellId="../mossySpikerONPop/0/mossySpikerON" preSegmentId="0" preFractionAlong="0.5" postCellId="../iaF_GrCPop/40/iaF_GrC" postSegmentId="0" postFractionAlong="0.5"/>
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        </projection>
        <projection id="OFFProjAMPA" presynapticPopulation="mossySpikerOFFPop" postsynapticPopulation="iaF_GrCPop" synapse="RothmanMFToGrCAMPA"/>
        <projection id="OFFProjNMDA" presynapticPopulation="mossySpikerOFFPop" postsynapticPopulation="iaF_GrCPop" synapse="RothmanMFToGrCNMDA"/>
    </network>
</neuroml>
